OpenVSP model (file version 5), 2 components.
Geometry view with OpenVSP parameter names; values to 6 digits, angles in degrees, lengths in the model's unit.
Overall bounding box: X_Min=0 X_Len=55 Y_Min=-25 Y_Len=50 Z_Min=-0.50029 Z_Len=1.00058

Wing "WingGeom"
  location (X Y Z) 0 0 0, rotation 0 0 0
  symmetric about XZ
  bounding box size 10 50 1.00058
  mass: Density=0 Shell_Flag=0 Mass_Area=1 Mass_Prior=0 PointMass=339 CGx=4.115 CGy=0 CGz=0 Ixx=0 Iyy=0 Izz=0 Ixy=0 Ixz=0 Iyz=0
  totals: TotalSpan=50 TotalProjectedSpan=50 TotalChord=10 TotalArea=500 TotalAR=5 MAC=10
  root: chord 10, twist 0, NACA 4-series Camber=0 CamberLoc=0.2 ThickChord=0.1
  sections:
    n  Span  Root_Chord  Tip_Chord  Area  Sweep  Sweep_Location  Dihedral  Twist  Twist_Location  tip airfoil
    1  25    10          10         250   0      0               0         0      0.25            as above

Wing "WingGeom"
  location (X Y Z) 50 0 0, rotation 0 0 0
  symmetric about XZ
  bounding box size 5 20 0.50029
  totals: TotalSpan=20 TotalProjectedSpan=20 TotalChord=5 TotalArea=100 TotalAR=4 MAC=5
  root: chord 5, twist 0, NACA 4-series Camber=0 CamberLoc=0.2 ThickChord=0.1
  sections:
    n  Span  Root_Chord  Tip_Chord  Area  Sweep  Sweep_Location  Dihedral  Twist  Twist_Location  tip airfoil
    1  10    5           5          50    0      0               0         0      0.25            as above

VSPAERO settings (reference component "WingGeom"): Sref=500 bref=50 cref=10 Xcg=6.81615 Ycg=0 Zcg=0 AlphaStart=-10 AlphaEnd=10 AlphaNpts=20 BetaStart=0 BetaEnd=0 BetaNpts=1 MachStart=0.05 MachEnd=0 MachNpts=1 ReCref=250000 Vinf=100 Rho=0.002377
